<?xml version="1.0" encoding="UTF-8"?>

<piston_engine name="LYCOMING O-320">
  <!--
      Lycoming O-320-B series four-cylinder engine, 160hp
      Copyright (c) 2017 Ludovic Brenta <ludovic@ludovic-brenta.org>

      This program is free software; you can redistribute it and/or
      modify it under the terms of the GNU General Public License
      as published by the Free Software Foundation; either version 2
      of the License, or (at your option) any later version.

      This program is distributed in the hope that it will be useful,
      but WITHOUT ANY WARRANTY; without even the implied warranty of
      MERCHANTABILITY or FITNESS FOR A PARTICULAR PURPOSE.  See the
      GNU General Public License for more details.

      Source: O-320 Operator Manual (document number 60297-30), page
      34: sea level power curve

  -->
  <minmp unit="INHG">         8.0  </minmp>
  <maxmp unit="INHG">        29.0  </maxmp>
  <displacement unit="IN3"> 319.8  </displacement>
  <bore unit="IN">            5.125</bore>
  <stroke unit="IN">          3.875</stroke>
  <cylinders>                 4    </cylinders>
  <compression-ratio>         8.5  </compression-ratio>
  <cycles>                    4    </cycles>
  <idlerpm>                 500.0  </idlerpm>
  <sparkfaildrop>             0.8  </sparkfaildrop>

  <maxhp unit="HP">         164.0  </maxhp> <!-- *not* the "rated" horsepower -->
  <maxrpm>                 2800.0  </maxrpm> <!-- *not* the "rated" RPM -->

  <!-- The O-320 Operator Manual states the full-throttle BSFC is 0.52
       but this yields too much fuel burn.  Here I adjust to reach 8.5
       gal/h at 75% power by multiplying both volumetric efficiency
       and BSFC by 0.62. -->
  <bsfc unit="LBS/HP*HR">     0.31 </bsfc>
  <volumetric-efficiency>     0.62 </volumetric-efficiency>

</piston_engine>
