<?xml version="1.0" encoding="UTF-8"?>

<!-- ########################################

 # DR400-dauphin
 # DR400-dauphin by PAF team
 # April 2012 : Modified by PAF team
 # http://equipe-flightgear.forumactif.com

##########################################-->

<!--
SENSENICH 76 EM8 S5-0-64
Diameter: 76 in (1.93 m)
Pitch: 64 in
Calculated blade angle: 20° at 75% of the radius

Takeoff: 2200 rpm minimum
Max rpm: 2700

Data from NACA Report 640 : http://naca.central.cranfield.ac.uk/reports/1938/naca-report-640.pdf
-->

<propeller name="prop">
  <ixx> 3.43 </ixx>
  <diameter unit="IN"> 76 </diameter>
  <numblades> 2 </numblades>
  <gearratio>1.0</gearratio>
  <p_factor> 6 </p_factor>
  <minpitch>20</minpitch>
  <maxpitch>20</maxpitch>

  <table name="C_THRUST" type="internal">
    <tableData>
      0     0.1040
      0.1   0.1040
      0.2   0.1030
      0.3   0.1010
      0.4   0.0930
      0.5   0.0820
      0.6   0.0700
      0.7   0.0550
      0.8   0.0390
      0.9   0.0240
      1     0.0060
      1.5  -0.0600
      2    -0.0720
      3    -0.0800
    </tableData>
  </table>

  <table name="C_POWER" type="internal">
    <tableData>
      0     0.0660
      0.1   0.0650
      0.2   0.0640
      0.3   0.0625
      0.4   0.0600
      0.5   0.0580
      0.6   0.0540
      0.7   0.0475
      0.8   0.0370
      0.9   0.0260
      1     0.0100
      1.5  -0.0400
      2    -0.0500
      3    -0.0550
    </tableData>
  </table>

</propeller>
