<?xml version="1.0" encoding="UTF-8"?>
<?xml-stylesheet type="text/xsl" href="http://jsbsim.sourceforge.net/JSBSim.xsl"?>

<!-- ########################################

 # DR400-dauphin by PAF team
 # April 2012 : Modified by PAF team
 # Sept 2012 : Modified for DR400-dauphin (dany)
 # http://equipe-flightgear.forumactif.com

##########################################-->

<fdm_config name="DR400-dauphin" version="2.0" release="BETA"
            xmlns:xsi="http://www.w3.org/2001/XMLSchema-instance"
            xsi:noNamespaceSchemaLocation="http://jsbsim.sourceforge.net/JSBSim.xsd">

  <fileheader>
    <author>Daniel Dubreuil, Guillaume Chauvat</author>
    <filecreationdate> 2007-05-01 </filecreationdate>
    <version> 2013-02-19 </version>
    <description> Robin DR400-dauphin </description>
  </fileheader>

  <metrics>
    <wingarea  unit="M2">       13.60 </wingarea>
    <wingspan  unit="M" >        8.72 </wingspan>
    <wing_incidence unit="DEG">  2.00 </wing_incidence>
    <chord    unit="M" >         1.56 </chord> <!-- 1.71 m for the center part -->
    <htailarea unit="M2">        2.88 </htailarea>
    <htailarm  unit="M" >        3.75 </htailarm>
    <vtailarea unit="M2">        1.63 </vtailarea>
    <vtailarm  unit="M" >        3.95 </vtailarm>
    <location name="AERORP" unit="M">
      <x>  -1.43 </x> <!-- for CG never behind even if loaded -->
      <y>  0.00 </y>
      <z>  0.00 </z>
    </location>
    <location name="EYEPOINT" unit="M">
      <x>  -1.31 </x>
      <y>  -0.28 </y>
      <z>  0.55 </z>
    </location>
    <location name="VRP" unit="M">
      <x> 0 </x> <!-- was 180 in -->
      <y> 0 </y>
      <z> 0 </z> <!-- was 12 in -->
    </location>
  </metrics>

  <mass_balance>
    <ixx unit="KG*M2">      2500 </ixx> <!-- TODO: calculate a correct value -->
    <iyy unit="KG*M2">      2800 </iyy>
    <izz unit="KG*M2">      4000 </izz>
    <ixy unit="KG*M2">        0 </ixy>
    <ixz unit="KG*M2">        0 </ixz>
    <iyz unit="KG*M2">        0 </iyz>
    <emptywt unit="KG" >    620 </emptywt> <!-- DR400-dauphin -->
    <location name="CG" unit="M">
      <x>  -1.45 </x> <!-- 0.32 from leading edge for 200 m.kg empty -->
      <y>  0.00 </y>
      <z>  -0.18 </z>
    </location>

    <pointmass name="PILOT" >
      <weight unit="KG">75</weight>
      <location name="POINTMASS" unit="M">
        <x> -1.36 </x>
        <y> -0.28 </y>
        <z>  0.05 </z>
      </location>
    </pointmass>

    <pointmass name="COPILOT">
      <weight unit="KG">70</weight>
      <location name="POINTMASS" unit="M">
        <x> -1.36 </x>
        <y>  0.28 </y>
        <z>  0.05 </z>
      </location>
    </pointmass>

    <pointmass name="LEFT_PASSENGER">
      <weight unit="KG">0</weight>
      <location name="POINTMASS" unit="M">
        <x> -0.58 </x>
        <y> -0.28 </y>
        <z>  0.05 </z>
      </location>
    </pointmass>

    <pointmass name="RIGHT_PASSENGER">
      <weight unit="KG">0</weight>
      <location name="POINTMASS" unit="M">
        <x> -0.58 </x>
        <y>  0.28 </y>
        <z>  0.05 </z>
      </location>
    </pointmass>

    <pointmass name="LUGGAGE">
      <weight unit="KG">5</weight>
      <location name="POINTMASS" unit="M">
        <x>  0.13 </x>
        <y>  0.00 </y>
        <z>  0.10 </z>
      </location>
    </pointmass>

  </mass_balance>

  <ground_reactions>

    <contact type="BOGEY" name="NOSE">
      <location unit="M">
        <x> -2.57 </x>
        <y>  0.00 </y>
        <z> -1.11 </z>
      </location>
      <static_friction>  0.80 </static_friction>
      <dynamic_friction> 0.50 </dynamic_friction>
      <rolling_friction> 0.02 </rolling_friction>
      <spring_coeff unit="N/M">      40000 </spring_coeff>
      <damping_coeff unit="N/M/SEC"> 13000 </damping_coeff>
      <max_steer unit="DEG"> 20.00 </max_steer>
      <brake_group>NONE</brake_group>
      <retractable>0</retractable>
    </contact>

    <contact type="BOGEY" name="LEFT_MAIN">
      <location unit="M">
        <x> -1.02 </x>
        <y> -1.24 </y>
        <z> -1.11 </z>
      </location>
      <static_friction>  0.80 </static_friction>
      <dynamic_friction> 0.50 </dynamic_friction>
      <rolling_friction> 0.02 </rolling_friction>
      <spring_coeff unit="N/M">      65000 </spring_coeff>
      <damping_coeff unit="N/M/SEC"> 24000 </damping_coeff>
      <max_steer unit="DEG">0</max_steer>
      <brake_group>LEFT</brake_group>
      <retractable>0</retractable>
    </contact>

    <contact type="BOGEY" name="RIGHT_MAIN">
      <location unit="M">
        <x> -1.02 </x>
        <y>  1.24 </y>
        <z> -1.11 </z>
      </location>
      <static_friction>  0.80 </static_friction>
      <dynamic_friction> 0.50 </dynamic_friction>
      <rolling_friction> 0.02 </rolling_friction>
      <spring_coeff unit="N/M">      65000 </spring_coeff>
      <damping_coeff unit="N/M/SEC"> 24000 </damping_coeff>
      <max_steer unit="DEG">0</max_steer>
      <brake_group>RIGHT</brake_group>
      <retractable>0</retractable>
    </contact>

    <contact type="STRUCTURE" name="TAIL">
      <location unit="M">
        <x>  2.82 </x>
        <y>  0.00 </y>
        <z> -0.24 </z>
      </location>
      <static_friction>  0.2 </static_friction>
      <dynamic_friction> 0.2 </dynamic_friction>
      <spring_coeff unit="N/M">      190000 </spring_coeff>
      <damping_coeff unit="N/M/SEC">  15000 </damping_coeff>
    </contact>


    <contact type="STRUCTURE" name="LEFT_WING">
      <location unit="M">
        <x> -1.20 </x>
        <y> -4.35 </y>
        <z>  0.00 </z>
      </location>
      <static_friction>  0.2 </static_friction>
      <dynamic_friction> 0.2 </dynamic_friction>
      <spring_coeff unit="N/M">      190000 </spring_coeff>
      <damping_coeff unit="N/M/SEC">  15000 </damping_coeff>
    </contact>

    <contact type="STRUCTURE" name="RIGHT_WING">
      <location unit="M">
        <x> -1.20 </x>
        <y>  4.35 </y>
        <z>  0.00 </z>
      </location>
      <static_friction>  0.2 </static_friction>
      <dynamic_friction> 0.2 </dynamic_friction>
      <spring_coeff unit="N/M">      190000 </spring_coeff>
      <damping_coeff unit="N/M/SEC">  15000 </damping_coeff>
    </contact>

  </ground_reactions>
  <external_reactions>

    <force name="tractor" frame="BODY">
    <location unit="M">
        <x> -2.57 </x>
        <y>  0.00 </y>
        <z> -1.11 </z>
    </location>
    <direction>
      <x>1</x>
      <y>0</y>
      <z>0</z>
    </direction>
    </force>

  </external_reactions>

  <propulsion>

    <engine file="Lycoming_O-320">
      <location unit="M">
        <x>  -2.60 </x>
        <y>  0.00 </y>
        <z>  0.00 </z>
      </location>
      <orient unit="DEG">
        <pitch> 0.00 </pitch>
        <roll>  0.00 </roll>
        <yaw>  0.00 </yaw>
      </orient>
      <feed>0</feed>
      <feed>1</feed>
      <feed>2</feed>
      <thruster file="prop76_EM8_S5-0-64">
        <location unit="M">
          <x>  -3.15 </x>
          <y>  0.00 </y>
          <z>  0.00 </z>
        </location>
        <orient unit="DEG">
          <pitch> 0.00 </pitch>
          <roll>  0.00 </roll>
          <yaw>  0.00 </yaw>
        </orient>
      </thruster>
    </engine>

    <tank type="FUEL" number="0"> <!-- left wing -->
      <location unit="M">
        <x>  -1.67 </x> <!-- 0.10 from  leading edge -->
        <y>  -1.24 </y>
        <z>  -0.35 </z>
      </location>
      <capacity unit="KG"> 28.84 </capacity> <!-- 40 L -->
      <contents unit="KG"> 14.0 </contents>
      <type>AVGAS</type> <!-- 0.721 kg/L -->
    </tank>

    <tank type="FUEL" number="1"> <!-- main -->
      <location unit="M">
        <x>  -0.65 </x> <!-- 1.12 from leading edge -->
        <y>  0.00 </y>
        <z>  -0.35 </z>
      </location>
      <capacity unit="KG"> 79.31 </capacity> <!-- 109 L available on 110 L total-->
      <contents unit="KG"> 60.0 </contents>
      <type>AVGAS</type> <!-- 0.721 kg/L -->
    </tank>

    <tank type="FUEL" number="2"> <!-- right wing -->
      <location unit="M">
        <x>  -1.67 </x>
        <y>  1.24 </y>
        <z>  -0.35 </z>
      </location>
      <capacity unit="KG"> 28.84 </capacity> <!-- 40 L -->
      <contents unit="KG"> 14.0 </contents>
      <type>AVGAS</type> <!-- 0.721 kg/L -->
    </tank>

  </propulsion>

  <flight_control name="FCS: DR400-dauphin">

    <channel name="Pitch">
      <summer name="Pitch Trim Sum">
        <input>fcs/elevator-cmd-norm</input>
        <input>fcs/pitch-trim-cmd-norm</input>
        <clipto>
          <min> -1 </min>
          <max>  1 </max>
        </clipto>
      </summer>

      <aerosurface_scale name="Elevator Control">
        <input>fcs/pitch-trim-sum</input>
        <range>
          <min> -0.35 </min>
          <max>  0.30 </max>
        </range>
        <output>fcs/elevator-pos-rad</output>
      </aerosurface_scale>

      <aerosurface_scale name="Elevator Position">
        <input>fcs/elevator-cmd-norm</input>
        <range>
          <min>-1</min>
          <max>1</max>
        </range>
        <output>fcs/elevator-pos-norm</output>
      </aerosurface_scale>

    </channel>

    <channel name="Roll">
      <summer name="Roll Trim Sum">
        <input>fcs/aileron-cmd-norm</input>
        <input>fcs/roll-trim-cmd-norm</input>
        <clipto>
          <min> -1 </min>
          <max>  1 </max>
        </clipto>
      </summer>

      <aerosurface_scale name="Left Aileron Control">
        <input>fcs/roll-trim-sum</input>
        <range>
          <min> -0.35 </min>
          <max>  0.35 </max>
        </range>
        <output>fcs/left-aileron-pos-rad</output>
      </aerosurface_scale>

      <aerosurface_scale name="Left Aileron Position">
        <input>fcs/aileron-cmd-norm</input>
        <range>
          <min>-1</min>
          <max>1</max>
        </range>
        <output>fcs/left-aileron-pos-norm</output>
      </aerosurface_scale>

      <aerosurface_scale name="Right Aileron Control">
        <input>fcs/roll-trim-sum</input>
        <range>
          <min> -0.35 </min>
          <max>  0.35 </max>
        </range>
        <output>fcs/right-aileron-pos-rad</output>
      </aerosurface_scale>

      <aerosurface_scale name="Right Aileron Position">
        <input>fcs/aileron-cmd-norm</input>
        <range>
          <min>1</min>
          <max>-1</max>
        </range>
        <output>fcs/right-aileron-pos-norm</output>
      </aerosurface_scale>

    </channel>

    <channel name="Yaw">
      <summer name="Rudder Command Sum">
        <input>fcs/rudder-cmd-norm</input>
        <input>fcs/yaw-trim-cmd-norm</input>
        <limit>
          <min> -0.35 </min>
          <max>  0.35 </max>
        </limit>
      </summer>

      <aerosurface_scale name="Rudder Control">
        <input>fcs/rudder-command-sum</input>
        <range>
          <min> -0.35 </min>
          <max>  0.35 </max>
        </range>
        <output>fcs/rudder-pos-rad</output>
      </aerosurface_scale>

      <aerosurface_scale name="Rudder Position">
        <input>fcs/rudder-cmd-norm</input>
        <range>
          <min>1</min>
          <max>-1</max>
        </range>
        <output>fcs/rudder-pos-norm</output>
      </aerosurface_scale>

    </channel>

    <channel name="Flaps">
      <kinematic name="Flaps Control">
        <input>fcs/flap-cmd-norm</input>
        <traverse>
          <setting>
            <position>  0 </position>
            <time>      0 </time>
          </setting>
          <setting>
            <position> 0.25 </position>
            <time>      1.5 </time>
          </setting>
          <setting>
            <position> 1 </position>
            <time>    3 </time>
          </setting>
        </traverse>
        <output>fcs/flap-pos-norm</output>
      </kinematic>

      <aerosurface_scale name="Flap Position degree">
        <input>fcs/flap-pos-norm</input>
        <range>
          <min>0</min>
          <max>60</max>
        </range>
        <output>fcs/flap-pos-deg</output>
      </aerosurface_scale>


    </channel>

    <channel name="Landing Gear">
    </channel>

    <channel name="Speedbrake">
      <kinematic name="Speedbrake Control">
        <input>fcs/speedbrake-cmd-norm</input>
        <traverse>
          <setting>
            <position> 0 </position>
            <time>    0 </time>
          </setting>
          <setting>
            <position> 1 </position>
            <time>    1 </time>
          </setting>
        </traverse>
        <output>fcs/speedbrake-pos-norm</output>
      </kinematic>

    </channel>

  </flight_control>

  <aerodynamics>

    <function name="aero/function/kCDge">
      <description>Change_in_drag_due_to_ground_effect</description>
        <table>
          <independentVar>aero/h_b-mac-ft</independentVar>
          <tableData>
            0.0000   0.0480
            0.1000   0.5150
            0.1500   0.6290
            0.2000   0.7090
            0.3000   0.8150
            0.4000   0.8820
            0.5000   0.9280
            0.6000   0.9620
            0.7000   0.9880
            0.8000   1.0000
            0.9000   1.0000
            1.0000   1.0000
            1.1000   1.0000
          </tableData>
        </table>
    </function>

    <function name="aero/function/kCLge">
      <description>Change_in_lift_due_to_ground_effect</description>
        <table>
          <independentVar>aero/h_b-mac-ft</independentVar>
          <tableData>
            0.0000   1.2030
            0.1000   1.1270
            0.1500   1.0900
            0.2000   1.0730
            0.3000   1.0460
            0.4000   1.0550
            0.5000   1.0190
            0.6000   1.0130
            0.7000   1.0080
            0.8000   1.0060
            0.9000   1.0030
            1.0000   1.0020
            1.1000   1.0000
          </tableData>
        </table>
    </function>


    <axis name="LIFT">

      <function name="aero/coefficient/CLalpha">
        <description>Lift_due_to_alpha</description>
        <product>
          <property>aero/qbar-psf</property>
          <property>metrics/Sw-sqft</property>
          <property>aero/function/kCLge</property>
          <table>
            <independentVar lookup="row">aero/alpha-wing-rad</independentVar>
            <independentVar lookup="column">fcs/flap-pos-deg</independentVar>
            <tableData>
              0      15      60
              -0.349  -0.538  -0.538  -0.538
              -0.314  -0.566  -0.628  -0.720
              -0.288  -0.627  -0.684  -0.768
              -0.279  -1.129  -0.985  -0.768
              -0.271  -1.156  -1.001  -0.768
              -0.244  -1.084  -0.900  -0.624
              -0.209  -1.004  -0.775  -0.432
              0.000  0.090  0.403  0.768
              0.070  0.484  0.806  1.200
              0.175  1.075  1.382  1.872
              0.244  1.406  1.661  2.043
              0.262  1.459  1.696  2.052
              0.279  1.498  1.718  1.980
              0.305  1.522  1.739  1.600
              0.314  1.485  1.692  1.350
              0.332  1.280  1.400  1.200
              0.349  1.020  1.150  1.100
              0.419  0.768  0.900  1.000
              0.611  0.576  0.700  0.850
            </tableData>
          </table>
        </product>
      </function>

      <function name="aero/coefficient/dCLsb">
        <description>Delta_Lift_due_to_speedbrake</description>
        <product>
          <property>aero/qbar-psf</property>
          <property>metrics/Sw-sqft</property>
          <property>fcs/speedbrake-pos-norm</property>
          <value>0</value>
        </product>
      </function>

      <function name="aero/coefficient/CLde">
        <description>Lift_due_to_Elevator_Deflection</description>
        <product>
          <property>aero/qbar-psf</property>
          <property>metrics/Sh-sqft</property>
          <property>fcs/elevator-pos-rad</property>
          <value>0.2</value>
        </product>
      </function>

    </axis>

    <axis name="DRAG">

      <!-- under test Dany 2012-04-21 / Guillaume 2012-05-01 -->
      <function name="aero/coefficient/CD0">
        <description>Drag_due_to_alpha</description>
        <product>
          <property>aero/qbar-psf</property>
          <property>metrics/Sw-sqft</property>
          <property>aero/function/kCDge</property>
          <table>
            <independentVar lookup="row">aero/alpha-wing-rad</independentVar>
            <tableData>
              -1.571	1.6000
              -0.349	0.4800
              -0.209	0.0400
              -0.105	0.0355
              -0.052	0.0344
              -0.009	0.0343
              0.018	0.0345
              0.057	0.0350
              0.080	0.0354
              0.096	0.0360
              0.115	0.0367
              0.150	0.0385
              0.209	0.0430
              0.279	0.0540
              0.349	0.4800
              1.571	1.6000
            </tableData>
          </table>
        </product>
      </function>

      <!-- under test Dany 21 avril 2012 /  Guillaume 2012-05-01, with drag due to alpha -->
      <function name="aero/coefficient/CDi">
        <description>Induced_drag</description>
        <product>
          <property>aero/qbar-psf</property>
          <property>metrics/Sw-sqft</property>
          <property>aero/cl-squared</property>
          <value>0.067</value>
        </product>
      </function>

      <function name="aero/coefficient/CDmach">
        <description>Drag_due_to_mach</description>
        <product>
          <property>aero/qbar-psf</property>
          <property>metrics/Sw-sqft</property>
          <table>
            <independentVar lookup="row">velocities/mach</independentVar>
            <tableData>
              0.00      0.000
              0.65      0.000
              1.10      0.023
              1.80      0.015
            </tableData>
          </table>
        </product>
      </function>

      <function name="aero/coefficient/CDflap">
        <description>Drag_due_to_flaps</description>
        <product>
          <property>aero/qbar-psf</property>
          <property>metrics/Sw-sqft</property>
          <property>fcs/flap-pos-deg</property>
          <property>aero/function/kCDge</property>
          <value> 0.00060 </value>
        </product>
      </function>

      <function name="aero/coefficient/CDbeta">
        <description>Drag_due_to_sideslip</description>
        <product>
          <property>aero/qbar-psf</property>
          <property>metrics/Sw-sqft</property>
          <table>
            <independentVar lookup="row">aero/beta-rad</independentVar>
            <tableData>
              -1.57      0.8
              -0.26    0.040
              0.00      0.000
              0.26    0.040
              1.57      0.8
            </tableData>
          </table>
          <value>0.3</value>
        </product>
      </function>

      <function name="aero/coefficient/CDde">
        <description>Drag_due_to_Elevator_Deflection</description>
        <product>
          <property>aero/qbar-psf</property>
          <property>metrics/Sh-sqft</property>
          <abs><property>fcs/elevator-pos-rad</property></abs>
          <value>0.04</value>
        </product>
      </function>

    </axis>

    <axis name="SIDE">

      <function name="aero/coefficient/CYb">
        <description>Side_force_due_to_beta</description>
        <product>
          <property>aero/qbar-psf</property>
          <property>metrics/Sw-sqft</property>
          <property>aero/beta-rad</property>
          <value>-0.3</value>
        </product>
      </function>

    </axis>

    <axis name="ROLL">

      <function name="aero/coefficient/Clb">
        <description>Roll_moment_due_to_beta</description>
        <product>
          <property>aero/qbar-psf</property>
          <property>metrics/Sw-sqft</property>
          <property>metrics/bw-ft</property>
          <property>aero/beta-rad</property>
          <value>-0.025</value>
          <!-- stall and spin (1) -->
          <table>
            <independentVar lookup="row">aero/alpha-wing-rad</independentVar>
            <tableData>
              0.227     1
              0.244     5
            </tableData>
          </table>
        </product>
      </function>

      <function name="aero/coefficient/Clp">
        <description>Roll_moment_due_to_roll_rate (roll damping)</description>
        <product>
          <property>aero/qbar-psf</property>
          <property>metrics/Sw-sqft</property>
          <property>metrics/bw-ft</property>
          <property>aero/bi2vel</property>
          <property>velocities/p-aero-rad_sec</property>
          <value>-1</value>
        </product>
      </function>

      <function name="aero/coefficient/Clr">
        <description>Roll_moment_due_to_yaw_rate</description>
        <product>
          <property>aero/qbar-psf</property>
          <property>metrics/Sw-sqft</property>
          <property>metrics/bw-ft</property>
          <property>aero/bi2vel</property>
          <property>velocities/r-aero-rad_sec</property>
          <value>0.08</value>
          <!-- stall and spin (2) -->
          <table>
            <independentVar lookup="row">aero/alpha-wing-rad</independentVar>
            <independentVar lookup="column">velocities/r-aero-rad_sec</independentVar>
            <tableData>
                       -0.15  -0.1   0    0.1   0.15
              0.227     1      1     1    1     1
              0.244     50     20    1    20    50
            </tableData>
          </table>
        </product>
      </function>

      <function name="aero/coefficient/Clda">
        <description>Roll_moment_due_to_aileron</description>
        <product>
          <property>aero/qbar-psf</property>
          <property>metrics/Sw-sqft</property>
          <property>metrics/bw-ft</property>
          <property>fcs/left-aileron-pos-rad</property>
          <table>
            <independentVar lookup="row">velocities/mach</independentVar>
            <tableData>
              0.0    0.185
              0.7    0.185
              2.0    0.057
            </tableData>
          </table>
          <!-- stall and spin (3): less efficient ailerons -->
          <table>
            <independentVar lookup="row">aero/alpha-wing-rad</independentVar>
            <tableData>
               0.244    1
               0.262    0.3
               0.611   -0.1
            </tableData>
          </table>
        </product>
      </function>

      <function name="aero/coefficient/Cldr">
        <description>Roll_moment_due_to_rudder</description>
        <product>
          <property>aero/qbar-psf</property>
          <property>metrics/Sw-sqft</property>
          <property>metrics/bw-ft</property>
          <property>fcs/rudder-pos-rad</property>
          <value>0.01</value>
        </product>
      </function>

    </axis>

    <axis name="PITCH">

      <function name="aero/coefficient/Cmo">
        <description>Pitching_moment_at_zero_alpha</description>
        <product>
          <property>aero/qbar-psf</property>
          <property>metrics/Sw-sqft</property>
          <property>metrics/cbarw-ft</property>
          <value>0.1300</value>
        </product>
      </function>


      <function name="aero/coefficient/Cmalpha">
        <description>Pitch_moment_due_to_alpha</description>
        <product>
          <property>aero/qbar-psf</property>
          <property>metrics/Sw-sqft</property>
          <property>metrics/cbarw-ft</property>
          <table>
            <independentVar lookup="row">aero/alpha-wing-rad</independentVar>
            <tableData>
              -0.400  0.55
              -0.305  0.58
              -0.285  0.58
              0.285  -0.58
              0.305  -0.58
              0.400  -0.55
            </tableData>
          </table>
        </product>
      </function>

      <function name="aero/coefficient/Cmde">
        <description>Pitch_moment_due_to_elevator</description>
        <product>
          <property>aero/qbar-psf</property>
          <property>metrics/Sw-sqft</property>
          <property>metrics/cbarw-ft</property>
          <table>
            <independentVar lookup="row">fcs/elevator-pos-rad</independentVar>
            <independentVar lookup="column">aero/alpha-deg</independentVar>
            <tableData>
                        -22    -18      0       18     22
              -0.35      0.17   0.51    0.51    0.51   0.17
               0         0      0       0       0      0
               0.3      -0.14  -0.44   -0.44   -0.44  -0.14
            </tableData>
          </table>
        </product>
      </function>

      <function name="aero/coefficient/Cmflap">
        <description>Pitch_moment_due_to_flaps</description>
        <product>
          <property>aero/qbar-psf</property>
          <property>metrics/Sw-sqft</property>
          <property>metrics/cbarw-ft</property>
          <table>
            <independentVar lookup="row">fcs/flap-pos-deg</independentVar>
            <tableData>
              0    0
              15    -0.060
              60    -0.120
            </tableData>
          </table>
        </product>
      </function>

      <function name="aero/coefficient/Cmq">
        <description>Pitch_moment_due_to_pitch_rate</description>
        <product>
          <property>aero/qbar-psf</property>
          <property>metrics/Sw-sqft</property>
          <property>metrics/cbarw-ft</property>
          <property>aero/ci2vel</property>
          <property>velocities/q-aero-rad_sec</property>
          <value>-12</value>
        </product>
      </function>

      <function name="aero/coefficient/Cmadot">
        <description>Pitch_moment_due_to_alpha_rate</description>
        <product>
          <property>aero/qbar-psf</property>
          <property>metrics/Sw-sqft</property>
          <property>metrics/cbarw-ft</property>
          <property>aero/ci2vel</property>
          <property>aero/alphadot-rad_sec</property>
          <value>-7</value>
        </product>
      </function>

    </axis>

    <axis name="YAW">

      <function name="aero/coefficient/Cnb">
        <description>Yaw_moment_due_to_beta</description>
        <product>
          <property>aero/qbar-psf</property>
          <property>metrics/Sw-sqft</property>
          <property>metrics/bw-ft</property>
          <property>aero/beta-rad</property>
          <value>0.05</value>
        </product>
      </function>

      <function name="aero/coefficient/Cnpw"> <!-- En test -->
        <description>Yaw_moment_due_to_propwash</description>
        <product>
          <property>propulsion/engine/thrust-lbs</property>
          <value>-0.2</value>
        </product>
      </function>

      <function name="aero/coefficient/Cnr">
        <description>Yaw_moment_due_to_yaw_rate</description>
        <product>
          <property>aero/qbar-psf</property>
          <property>metrics/Sw-sqft</property>
          <property>metrics/bw-ft</property>
          <property>aero/bi2vel</property>
          <property>velocities/r-aero-rad_sec</property>
          <value>-0.15</value>
        </product>
      </function>

      <function name="aero/coefficient/Cndr">
        <description>Yaw_moment_due_to_rudder</description>
        <product>
          <property>aero/qbar-psf</property>
          <property>metrics/Sw-sqft</property>
          <property>metrics/bw-ft</property>
          <property>fcs/rudder-pos-rad</property>
          <value>-0.06</value>
        </product>
      </function>

      <function name="aero/coefficient/Cnda">
        <description>Adverse_yaw</description>
        <product>
          <property>aero/qbar-psf</property>
          <property>metrics/Sw-sqft</property>
          <property>metrics/bw-ft</property>
          <property>fcs/left-aileron-pos-rad</property>
          <value>-0.01</value>
        </product>
      </function>

    </axis>

  </aerodynamics>
  <system file="shadow-tweak"/>
  <system file="crash-detect"/>
  <system file="engine"/>
</fdm_config>
